variable	name string rollingPart

thermo_modify	flush yes lost warn

units		si

###############################################
# Particle parameters
################################################

variable	min_rad equal 5

variable 	sk equal ${min_rad}

variable	coeffRes equal 0.1
variable	coeffFric equal 5.67128182

variable	kn equal 10^8
variable	kt equal 10^8
#variable	kt equal 0.2*${kn}

variable	gravity equal 10.0
variable	density equal 1000.0

variable	min_mass equal ${density}*4.0/3.0*PI*${min_rad}*${min_rad}*${min_rad}
variable	a equal (-2.0*log(${coeffRes})/PI)^2
variable        gamma_n equal sqrt($a*2*${kn}/${min_mass}/(1+0.25*$a))
variable        gamma_t equal ${gamma_n}*0.5

variable	tcol equal PI/sqrt(2*${kn}/${min_mass}-${gamma_n}/4.0)

variable	dt equal 0.000001
#variable	dt equal ${tcol}*0.002
timestep	${dt}

###############################################

variable	dumpfreq equal 100000
variable	logfreq equal 100000

newton 		on
atom_style	sphere

boundary	f f f

region		boxreg block 0 150 0 150 0 15
create_box	1 boxreg

######### No viscoelastic damping for nornal nor tangential forces #########

pair_style	gran/hooke/history &
		${kn} ${kt} 0 0 ${coeffFric} 0

#pair_style	gran/hooke/history &
#		${kn} ${kt} 0 0 0 0

pair_coeff	* *

neighbor        ${sk} bin
thermo 		${logfreq}
comm_modify 	mode multi group all vel yes

################## Spheres creation and their properties ####################

variable	theta equal (step/400000)*2*PI

create_atoms 	1 single 5 15 ${min_rad}

set 		atom 1 diameter 10

group		group1 id 1

fix		pl all wall/gran hooke/history ${kn} ${kt} 0 0 ${coeffFric} 0 zplane 0 NULL

fix		grav group1 gravity ${gravity} vector 0.5 0 -0.866025404

fix		1 all nve/sphere

dump		1 all custom ${dumpfreq} ${name}_linear.dump &
		id type radius x y z omegay vx vy vz tqy

thermo_style	custom step cpu atoms ke

run		9500000
